# Практическое занятие №1 | Вариант 19
# 1) Найдем производную заданной функции, используя операции символьных вычислений:
d/dx(5*x^(2/3) - 2*x^(5/2) + 2*x^-3) → 10/(3*x^(1/3)) - 6/x^4 - 5*x^(3/2)
# 2) Решим аналитически заданное уравнение:
-3*x^5 + x^4 - 2*x^2 + x + 1 solve, x → [
    0.791353147826;
    0.413945251467 + 0.915777438976i;
    0.413945251467 - 0.915777438976i;
    -0.642955158713 + 0.0604817023649i;
    -0.642955158713 - 0.0604817023649i
]
# Оставим только рациональные корни:
-3*x^5 + x^4 - 2*x^2 + x + 1 solve, x, assume, x == real → 0.791353147826 = 0.791353
f(x) := -3*x^5 + x^4 - 2*x^2 + x + 1
xreal := 0.791
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# Для найденного вещественного корня повторим процедуру поиска решения, выбрав точку в окрестности этого корня
x0 := 0.5
root(f(x0), x0) = 0.791353
root(f(x), x, 0.5, 1) = 0.791355
# 3) Для заданной функции найдем ее изображение, используя прямое преобразование Лапласа:
(e^at - e^bt)/t laplace, t → (e^at - e^bt)*laplace(1/t, t, s)
