# Практическая работа №2 | Вариант 19
# 1) Создадим матрицы и заполним их соответствующими параметрами:
a := 3.1
b := 1.5
c := 2.1
k := 1.1
n := -1.6
m := 3.2
A := [a, b, c; -m, n, k; c, b, -a] = [3.1, 1.5, 2.1; -3.2, -1.6, 1.1; 2.1, 1.5, -3.1]
B := [b, -c; m, b; n, k] = [1.5, -2.1; 3.2, 1.5; -1.6, 1.1]
C := [n, a; m, b] = [-1.6, 3.1; 3.2, 1.5]
D := [a - b; -n; c + b] = [1.6; 1.6; 3.6]
K := [n, -a, a + b; m, b, n + m; c, n, c - b] = [-1.6, -3.1, 4.6; 3.2, 1.5, 1.6; 2.1, -1.6, 0.6]
M := [b - a, c] = [-1.6, 2.1]
# 2) Выполним действия над матрицами:
# 2.2)
B - M =  # error: Размерности массива не совпадают.
# Вычитать можно только матрицы одинакового размера
A^2 = [9.22, 5.4, 1.65; -2.49, -0.59, -11.89; -4.8, -3.9, 15.67]
# 2.1)
transpose(transpose(B)[:, 0]) - M = [3.1, -4.2]
A^2 + K = [7.62, 2.3, 6.25; 0.71, 0.91, -10.29; -2.7, -5.5, 16.27]
submatrix(B, 0, 0, 0, 1) - M = [3.1, -4.2]
# 2.3) | 2.4)
b*C^-3 = [-0.0138476, 0.0306608; 0.0316499, 0.0168132]
A + 3*K = [-1.7, -7.8, 15.9; 6.4, 2.9, 5.9; 8.4, -3.3, -1.3]
# 2.6)
M^-2 =  # error: Эта матрица должна быть квадратной.  # 2.5)
A*K + A^2 = [13.47, -5.32, 19.57; -0.18, 5.17, -28.51; -9.87, -3.2, 25.87]
# Нельзя найти обратную матрицу у неквадратной матрицы
# Чтобы умножить две матрицы, например, матрицу A размера m x n на матрицу B размера p x q, должно выполняться условие n = p. Результатом будет матрица размера m x q
# 3) Найдем ранг матрицы A:
rank(A) = 3
# 4) Выполним транспонирование матрицы B и инвертирование матрицы A:
transpose(B) = [1.5, 3.2, -1.6; -2.1, 1.5, 1.1]
A^-1 = [-0.792245, -1.86692, -1.19914; 1.82145, 3.35567, 2.42461; 0.344663, 0.359023, 0.0382958]
A1 := [3.1, 1.5, 2.1; -3.2, -1.6, 1.1; 2.1, 1.5, -3.1]
A1 := [
    -0.792245093346, -1.86692197224, -1.19913834371;
    1.82144566778, 3.35567257061, 2.4246050742;
    0.344662517951, 0.359023456199, 0.0382958353279
]
# 5) Найдем обратную матрицу для матрицы K:
K^-1 = [-0.0720203, 0.114483, 0.246867; -0.0299738, 0.221057, -0.359685; 0.172141, 0.188793, -0.15653]
|A| = -4.178
# 6) Найдем определитель матрицы A
