# Практическая работа №3 | Вариант 19
# 1) Вычислим значения заданной функции в узлах интерполяции на заданном отрезке:
a := 0
b := 4
f(x) := 1/(1 + e^(-x))
n := 10
h := (b - a)/n
i := 0 .. n
x[i] := a + h*i
y[i] := f(x[i])
x = [0; 0.4; 0.8; 1.2; 1.6; 2; 2.4; 2.8; 3.2; 3.6; 4]
y = [0.5; 0.598688; 0.689974; 0.768525; 0.832018; 0.880797; 0.916827; 0.942676; 0.960834; 0.973403; 0.982014]
# 2) Проведем параболическую интерполяцию по вычисленной таблице:
# Искомая функция - полином вида:
P(x) == a[0] + a[1]*x + a[2]*x^2
# Выберем среднюю точку при i=5
# Тогда получим СЛАУ вида: | Cформируем матрицу коэффициентов:
[1, x[0], x[0]^2; 1, x[5], x[5]^2; 1, x[10], x[10]^2]*[a[0]; a[5]; a[10]] == [y[0]; y[5]; y[10]]
A := [1, x[0], x[0]^2; 1, x[5], x[5]^2; 1, x[10], x[10]^2]
Y := [y[0]; y[5]; y[10]]
# Далее воспользуемся lsolve для нахождения коэффициентов
B := lsolve(A, Y) = [0.5; 0.260294; -0.0349475]
P(x) := B[0] + B[1]*x + B[2]*x^2
# Построим график и отметим на нем узловые точки:
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# 3) Составим формулу интерполяционного многочлена Лагранжа. Для этого определим базисные многочлены:
L_i(X, i, n, t) := product(if(i == j, 1, (t - X[j])/(X[i] - X[j])), j = 0 .. n)
# Соберем интерполяционный многочлен:
L(X, n, Y, t) := sum(Y[i]*L_i(X, i, n, t), i = 0 .. n)
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# 4) Проведем интерполирование функции с помощью первой и второй формул Ньютона:
Newton1(x, y, n, t) :=
    for i ∈ 0 .. n
        r[i, 0] ← y[i]
    for k ∈ 1 .. n
        for i ∈ 0 .. n - k
            r[i, k] ← (r[i + 1, k - 1] - r[i, k - 1])
    s ← y[0]
    for k ∈ 1 .. n
        p ← 1
        for i ∈ 0 .. k - 1
            p ← p*(t - x[i])
        s ← r[0, k]/(k!*h^k)*p + s
    s
Newton2(x, y, n, t) :=
    for i ∈ 0 .. n
        r[i, 0] ← y[i]
    for k ∈ 1 .. n
        for i ∈ k .. n
            r[i, k] ← (r[i, k - 1] - r[i - 1, k - 1])
    s ← y[n]
    u ← (t - x[n])/h
    for k ∈ 1 .. n
        p ← 1
        for i ∈ 0 .. k - 1
            p ← p*(u + i)
        s ← r[n, k]/k!*p + s
    s
# # для n+1 точек последняя разность - k=n
# # 1..10 разности, 0..n-k i
# # от 1 до 10 разности
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# 5) Проведем линейную интерполяцию с помощью функции linterp:
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# 6) Проведем интерполяцию сплайнами с помощью встроенных функций Mathcad:
s1 := lspline(x, y)
s2 := pspline(x, y)
s3 := cspline(x, y)
# s1,2,3 - векторы вторых производных
# l - линейный сплайн, p - квадратичный, с - кубический
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# 7) Вычислим значения для экстраполяции:
i := 0 .. 40
x_e[i] := a + i/10
y_e[i] := f(x_e[i])
x_e = [
    0; 0.1; 0.2; 0.3; 0.4; 0.5; 0.6; 0.7; 0.8; 0.9
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]
y_e = [
    0.5; 0.524979; 0.549834; 0.574443; 0.598688; 0.622459; 0.645656; 0.668188; 0.689974; 0.71095
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]
extrapol_data := submatrix(y_e, 40 - 7, 40, 0, 0) = [0.964429; 0.967705; 0.970688; 0.973403; 0.975873; 0.978119; 0.98016; 0.982014]
i := 0 .. 50
x_e[i] := a + i/10
y_e[i] := f(x_e[i])
y_predicted[i] := y_e[i]
foo(y_predicted, predicted) :=
    for k ∈ 41 .. 50
        y_predicted[k] ← predicted[k - 41]
    y_predicted
predicted := predict(extrapol_data, 7, 10) = [0.983697; 0.985222; 0.986597; 0.987824; 0.988895; 0.989795; 0.990503; 0.990993; 0.991236; 0.991207]
# Проверка, что предсказание не до конца точное и вставка сработала
foo(y_predicted, predicted)[50] == y_e[50] → 0
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foo(y_predicted, predicted) = [
    0.5; 0.524979; 0.549834; 0.574443; 0.598688; 0.622459; 0.645656; 0.668188; 0.689974; 0.71095
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]
