# Практика №5. Вариант 19
# 1.1)
f(t) := sin(t)*sin(|cos(t)|)
T := 2*π
ω[1] := 2*π/T
k := 1 .. 5
a[k] := 2/T*integral(f(t)*cos(k*ω[1]*t), t = 0 .. T)
b[k] := 2/T*integral(f(t)*sin(k*ω[1]*t), t = 0 .. T)
F(t, k) := a[k]*cos(k*ω[1]*t) + b[k]*sin(k*ω[1]*t)
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Ff(t, n) := a[0]/2 + sum(a[k]*cos(k*ω[1]*t) + b[k]*sin(k*ω[1]*t), k = 1 .. n)
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A[k] := sqrt(a[k]^2 + b[k]^2)
φ[k] := -atan(b[k]/a[k])
ω[k] := k*ω[1]
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Fs(t, n) := a[0]/2 + sum(A[k]*cos(k*ω[1]*t - φ[k]), k = 1 .. n)  # Спектр - набор амплитуд и фаз гармоник.
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# 1.2)
h := (2*π - 0)/128
k := 0 .. 127
i := 0 .. 8
x[k] := 0 + h*k
v[k] := f(x[k])
f_f := fft(v)
f_if := ifft(f_f)
A[i] := sqrt(Re(f_f[i])^2 + Im(f_f[i])^2)
φ[i] := -arg(f_f[i])
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s[k] := v[k] + rnd(rnd(2) - 1)
s_f := fft(s)
α := 2
j := 0 .. 64
g[j] := s_f[j]*Φ(|s_f[j]| - α)
h := ifft(g)
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