# Треугольник Серпинского | Кристалл
# Детерминированный алгоритм | Детерминированный алгоритм
j := sqrt(-1)
T1 := [0.5, 0, 0, 0, 0.5, 0; 0.5, 0, 0.5, 0, 0.5, 0; 0.5, 0, 0.25, 0, 0.5, sqrt(3/4)]
j := sqrt(-1)
T2 := [
    0.255, 0, 0.3726, 0, 0.255, 0.6714;
    0.255, 0, 0.1146, 0, 0.255, 0.2232;
    0.255, 0, 0.6306, 0, 0.255, 0.2232;
    0.37, -0.642, 0.6356, 0.6342, 0.37, -0.0061
]
affin(X, M) :=
    for r ∈ 0 .. rows(X) - 1
        for i ∈ 0 .. rows(M) - 1
            re ← M[i, 0]*Re(X[r]) + M[i, 1]*Im(X[r]) + M[i, 2]
            im ← M[i, 3]*Re(X[r]) + M[i, 4]*Im(X[r]) + M[i, 5]
            Y[rows(M)*r + i] ← re + j*im
    Y
affin(X, M) :=
    for r ∈ 0 .. rows(X) - 1
        for i ∈ 0 .. rows(M) - 1
            re ← M[i, 0]*Re(X[r]) + M[i, 1]*Im(X[r]) + M[i, 2]
            im ← M[i, 3]*Re(X[r]) + M[i, 4]*Im(X[r]) + M[i, 5]
            Y[rows(M)*r + i] ← re + j*im
    Y
Fractal2(n) :=
    X[0] ← 0 + 0*j
    for i ∈ 1 .. n
        X ← affin(X, T2)
    X
Fractal1(n) :=
    X[0] ← 0 + 0*j
    for i ∈ 1 .. n
        X ← affin(X, T1)
    X
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# Рандомизированный алгоритм | Рандомизированный алгоритм
afinRnd(X, M) :=
    i ← floor(rnd(rows(M)))
    re ← M[i, 0]*Re(X) + M[i, 1]*Im(X) + M[i, 2]
    im ← M[i, 3]*Re(X) + M[i, 4]*Im(X) + M[i, 5]
    re + j*im
afinRnd(X, M) :=
    i ← floor(rnd(rows(M)))
    re ← M[i, 0]*Re(X) + M[i, 1]*Im(X) + M[i, 2]
    im ← M[i, 3]*Re(X) + M[i, 4]*Im(X) + M[i, 5]
    re + j*im
N2 := 1000
i := 1 .. N2
N1 := 10000
i := 1 .. N1
X2[0] := rnd(1) + j*rnd(1)
X2[i] := afinRnd(X2[i - 1], T2)
X1[0] := rnd(1) + j*rnd(1)
X1[i] := afinRnd(X1[i - 1], T1)
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